pleiades

# Mach
0.720000

# IYsym   IZsym   Zsym
0   0   0.000000

# Sref    Cref    Bref
0.360000   0.233333   1.600000

# Xref    Yref    Zref
0.360000   0.000000   0.010000


SURFACE
Wing
# Nchordwise  Cspace  Nspanwise  Sspace
22.000000   1.000000   32.000000   -1.100000

SCALE
1.000000  1.000000  1.000000

TRANSLATE
0.000000  0.000000  -0.000000

ANGLE
1.000000

YDUPLICATE
0.000000

SECTION
0.000000  0.000000  0.000000  0.300000  0.000000
AFILE
../airfoils/RAE102.dat

SECTION
0.236581  0.650000  0.000000  0.178125  0.000000
AFILE
../airfoils/RAE102.dat
CONTROL
aileron  -1.000000  0.650000  0.000000  0.000000  0.000000  -1.000000

SECTION
0.291176  0.800000  0.000000  0.150000  -0.000000
AFILE
../airfoils/RAE102.dat
CONTROL
aileron  -1.000000  0.650000  0.000000  0.000000  0.000000  -1.000000


SURFACE
Horizontal Tail
# Nchordwise  Cspace  Nspanwise  Sspace
16.000000   1.000000   24.000000   -1.100000

SCALE
1.000000  1.000000  1.000000

TRANSLATE
0.000000  0.000000  0.000000

ANGLE
-0.000000

YDUPLICATE
0.000000

SECTION
2.000000  0.000000  0.100000  0.250000  0.000000
AFILE
../airfoils/naca0008.dat

SECTION
2.010909  0.030000  0.100000  0.239091  0.000000
AFILE
../airfoils/naca0008.dat
CONTROL
elevator  1.000000  0.650000  0.000000  0.000000  0.000000  1.000000

SECTION
2.100000  0.275000  0.100000  0.150000  0.000000
AFILE
../airfoils/naca0008.dat
CONTROL
elevator  1.000000  0.650000  0.000000  0.000000  0.000000  1.000000


SURFACE
Vertical Tail
# Nchordwise  Cspace  Nspanwise  Sspace
9.000000   1.000000   14.000000   1.000000

SCALE
1.000000  1.000000  1.000000

TRANSLATE
0.000000  0.000000  0.000000

ANGLE
0.000000

SECTION
2.000000  0.000000  0.200000  0.250000  0.000000
AFILE
../airfoils/naca0008.dat

SECTION
2.030000  0.000000  0.260000  0.220000  0.000000
AFILE
../airfoils/naca0008.dat
CONTROL
rudder  -1.000000  0.800000  0.000000  0.000000  0.000000  1.000000

SECTION
2.100000  0.000000  0.400000  0.150000  0.000000
AFILE
../airfoils/naca0012.dat
CONTROL
rudder  -1.000000  0.800000  0.000000  0.000000  0.000000  1.000000
